**   ABAQUS Input Deck Generated by HyperMesh Version  : 2019.0.0.70
**   Generated using HyperMesh-Abaqus Template Version : 2019.0.0.70
**
**     Template:  ABAQUS/STANDARD 3D
**
*Heading
** Job name: Beam06 Model name: BeamContact
** Generated by: Abaqus/CAE 2017
*Preprint, echo=NO, model=NO, history=NO, contact=NO
**
** PARTS
**
*Part, name=PART-1
*Node
      1,         -50.,         1.25,          20.
      2,         -50.,       3.4375,          20.
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*Element, type=C3D8H
  1,   36,   37,   42,   41,    1,    2,    7,    6
  2,   37,   38,   43,   42,    2,    3,    8,    7
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*Nset, nset=CONNODE111
   1,   2,   3,   4,   5,   6,   7,   8,   9,  10,  11,  12,  13,  14,  15,  16
*Elset, elset=SLAVEPART, generate
   1,  480,    1
*Elset, elset=MASTERPART, generate
 481,  792,    1
** Section: Section-1
*Solid Section, elset=SLAVEPART, material=Material-1
,
** Section: Section-1
*Solid Section, elset=MASTERPART, material=Material-1
,
*End Part
**
**
** ASSEMBLY
**
*Assembly, name=Assembly
**
*Instance, name=PART-1-1, part=PART-1
*End Instance
**
*Elset, elset=AAAA, instance=PART-1-1, generate
 481,  792,    1
*Elset, elset=AUTO1, instance=PART-1-1, generate
   1,  480,    1
*Nset, nset=CONNODE, instance=PART-1-1
   1,   2,   3,   4,   5,   6
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*Nset, nset=SET-4, instance=PART-1-1, generate
 705,  735,    5
*Elset, elset=_MASTERSURF_S4, internal, instance=PART-1-1, generate
 483,  792,    3
*Elset, elset=_SLAVESURF_S6, internal, instance=PART-1-1, generate
   1,  477,    4
*Surface, type=ELEMENT, name=MASTERSURF
_MASTERSURF_S4, S4
*Surface, type=ELEMENT, name=SLAVESURF
_SLAVESURF_S6, S6
*End Assembly
**
** MATERIALS
**
*Material, name=Material-1
*Hyperelastic, mooney-rivlin
 0.195, 0.0162,   0.01
**
** INTERACTION PROPERTIES
**
*Surface Interaction, name=INTPROP-1
1.,
*Friction, slip tolerance=0.005
 0.8,
*Surface Behavior, penalty
**
** INTERACTIONS
**
** Interaction: INTPROP-1-1
*Contact Pair, interaction=INTPROP-1, type=SURFACE TO SURFACE
SLAVESURF, MASTERSURF
** ----------------------------------------------------------------
**
** STEP: Step-1
**
*Step, name=Step-1, nlgeom=YES, inc=100000
*Static, direct
0.002, 1.,
**
** BOUNDARY CONDITIONS
**
** Name: Disp-BC-1 Type: Displacement/Rotation
*Boundary
CONNODE, 1, 1
** Name: Disp-BC-2 Type: Displacement/Rotation
*Boundary
CONNODE, 2, 2
** Name: Disp-BC-3 Type: Displacement/Rotation
*Boundary
CONNODE, 3, 3
**
** LOADS
**
** Name: CFORCE-1   Type: Concentrated force
*Cload
SET-4, 2, -0.6
**
** OUTPUT REQUESTS
**
*Restart, write, frequency=0
**
** FIELD OUTPUT: F-Output-1
**
*Output, field, variable=PRESELECT
**
** HISTORY OUTPUT: H-Output-1
**
*Output, history, variable=PRESELECT
*End Step
